<?xml-stylesheet href="JSBSim.xsl" type="application/xml"?>

 <!--
    ################################################################################################
    copyright by Herbert Wagner 01/2016 for cat793D heavy off highway truck (Flightgear)
    ################################################################################################
-->

<fdm_config xmlns:xsi="http://www.w3.org/2001/XMLSchema-instance"
    xsi:noNamespaceSchemaLocation="http://jsbsim.sourceforge.net/JSBSim.xsd" version="2.0" release="BETA">

    <fileheader>
        <author>Herbert Wagner</author>
        <filecreationdate>2016-02-27</filecreationdate>
        <version>2.2</version>
        <description>A very big truck for mining action</description>
    </fileheader>

    <metrics>
        <wingarea unit="M2">8</wingarea>
        <wingspan unit="M">4</wingspan>
        <chord unit="M">2</chord>
        <htailarea unit="M2">1</htailarea>
        <htailarm unit="M">1</htailarm>
        <vtailarea unit="M2">1</vtailarea>
        <vtailarm unit="M">1</vtailarm>
        <location name="AERORP" unit="M">
            <x>0</x>
            <y>0</y>
            <z>1.0</z>
        </location>
        <location name="EYEPOINT" unit="M">
            <x>4.410 </x>
            <y>1.962 </y>
            <z>4.547</z>
        </location>
        <location name="VRP" unit="M">
            <x> 0.0 </x>
            <y> 0.0 </y>
            <z> 0.0 </z>
        </location>
    </metrics>

    <mass_balance>
        <ixx unit="SLUG*FT2"> 559600 </ixx>
        <iyy unit="SLUG*FT2"> 533400 </iyy>
        <izz unit="SLUG*FT2"> 1594500 </izz>
        <ixz unit="SLUG*FT2"> 0 </ixz>
        <emptywt unit="KG"> 117000 </emptywt>
        <location name="CG" unit="M">
            <x> 0.510 </x>
            <y> 0.0 </y>
            <z> 0.74 </z>
        </location>

	<pointmass name="lader">
            <weight unit="KG">0</weight>
            <location unit="M">
                <x>-0.110</x>
                <y>0</y>
                <z>2.353</z>
            </location>
        </pointmass>

	<pointmass name="Main-tank">
	    <weight unit="LBS">4920</weight>
	    <location name="Main Tank" unit="M">
		<x> -0.110 </x>
	        <y> 0.0 </y>
	        <z> 2.642 </z>
	    </location>
	</pointmass>

    </mass_balance>

    <ground_reactions>
        <contact type="BOGEY" name="FL">
            <location unit="M">
                <x> -3.072</x>
                <y>-3.15</y>
                <z>0.125</z>
            </location>
            <static_friction> 1.25 </static_friction>
            <dynamic_friction> 1.70 </dynamic_friction>
            <rolling_friction> 0.10 </rolling_friction>
            <spring_coeff unit="LBS/FT"> 700000 </spring_coeff>
            <damping_coeff unit="LBS/FT/SEC"> 180000 </damping_coeff>
            <max_steer unit="DEG"> 30 </max_steer>
            <brake_group> LEFT </brake_group>
            <retractable>0</retractable>
        </contact>
        <contact type="BOGEY" name="FR">
            <location unit="M">
                <x> -3.072</x>
                <y>3.15</y>
                <z>0.125</z>
            </location>
            <static_friction> 1.25 </static_friction>
            <dynamic_friction> 1.70 </dynamic_friction>
            <rolling_friction> 0.10 </rolling_friction>
            <spring_coeff unit="LBS/FT"> 700000 </spring_coeff>
            <damping_coeff unit="LBS/FT/SEC"> 180000 </damping_coeff>
            <max_steer unit="DEG"> 30 </max_steer>
            <brake_group> RIGHT </brake_group>
            <retractable>0</retractable>
        </contact>
        <contact type="BOGEY" name="BL">
            <location unit="M">
                <x> 2.906</x>
                <y>-3.28</y>
                <z>0.125</z>
            </location>
            <static_friction> 1.25 </static_friction>
            <dynamic_friction> 1.70 </dynamic_friction>
            <rolling_friction> 0.10 </rolling_friction>
            <spring_coeff unit="LBS/FT"> 700000 </spring_coeff>
            <damping_coeff unit="LBS/FT/SEC"> 180000 </damping_coeff>
            <brake_group> LEFT </brake_group>
            <retractable>0</retractable>
        </contact>
        <contact type="BOGEY" name="BR">
            <location unit="M">
                <x> 2.906</x>
                <y> 3.28</y>
                <z>0.125</z>
            </location>
            <static_friction> 1.25 </static_friction>
            <dynamic_friction> 1.70 </dynamic_friction>
            <rolling_friction> 0.10 </rolling_friction>
            <spring_coeff unit="LBS/FT"> 700000 </spring_coeff>
            <damping_coeff unit="LBS/FT/SEC"> 180000 </damping_coeff>
            <brake_group> RIGHT </brake_group>
            <retractable>0</retractable>
        </contact>
	<contact type="BOGEY" name="BLI">
            <location unit="M">
                <x> 2.906</x>
                <y>-1.69</y>
                <z>0.125</z>
            </location>
            <static_friction> 1.25 </static_friction>
            <dynamic_friction> 1.70 </dynamic_friction>
            <rolling_friction> 0.10 </rolling_friction>
            <spring_coeff unit="LBS/FT"> 700000 </spring_coeff>
            <damping_coeff unit="LBS/FT/SEC"> 180000 </damping_coeff>
            <brake_group> LEFT </brake_group>
            <retractable>0</retractable>
        </contact>
        <contact type="BOGEY" name="BRI">
            <location unit="M">
                <x> 2.906</x>
                <y> 1.69</y>
                <z>0.125</z>
            </location>
            <static_friction> 1.25 </static_friction>
            <dynamic_friction> 1.70 </dynamic_friction>
            <rolling_friction> 0.10 </rolling_friction>
            <spring_coeff unit="LBS/FT"> 700000 </spring_coeff>
            <damping_coeff unit="LBS/FT/SEC"> 180000 </damping_coeff>
            <brake_group> RIGHT </brake_group>
            <retractable>0</retractable>
        </contact>

	<contact type="STRUCTURE" name="MIDDLE-LEFT">
	<location unit="M">
	  <x> -1.58 </x>
	  <y> -3.462 </y>
	  <z> 3.659 </z>
	</location>
	<spring_coeff unit="LBS/FT"> 18000 </spring_coeff>
	<damping_coeff unit="LBS/FT/SEC"> 1000 </damping_coeff>
      </contact>
      <contact type="STRUCTURE" name="MIDDLE-RIGHT">
	<location unit="M">
	  <x> -1.58 </x>
	  <y>  3.462 </y>
	  <z> 3.659 </z>
	</location>
	<spring_coeff unit="LBS/FT"> 18000 </spring_coeff>
	<damping_coeff unit="LBS/FT/SEC"> 1000 </damping_coeff>
      </contact>

      <contact type="STRUCTURE" name="BACK-LEFT">
	<location unit="M">
	  <x> 6.67 </x>
	  <y> -3.151 </y>
	  <z> 4.315 </z>
	</location>
	<spring_coeff unit="LBS/FT"> 18000 </spring_coeff>
	<damping_coeff unit="LBS/FT/SEC"> 1000 </damping_coeff>
      </contact>
      <contact type="STRUCTURE" name="BACK-RIGHT">
	<location unit="M">
	  <x> 6.67 </x>
	  <y> 3.151 </y>
	  <z> 4.315 </z>
	</location>
	<spring_coeff unit="LBS/FT"> 18000 </spring_coeff>
	<damping_coeff unit="LBS/FT/SEC"> 1000 </damping_coeff>
      </contact>

      <contact type="STRUCTURE" name="LEFT-FRONT">
	<location unit="M">
	  <x> -6.60 </x>
	  <y> -1.815 </y>
	  <z> 1.873 </z>
	</location>
	<spring_coeff unit="LBS/FT"> 18000 </spring_coeff>
	<damping_coeff unit="LBS/FT/SEC"> 1000 </damping_coeff>
      </contact>
      <contact type="STRUCTURE" name="RIGHT-FRONT">
	<location unit="M">
	  <x> -6.60 </x>
	  <y> 1.815 </y>
	  <z> 1.873 </z>
	</location>
	<spring_coeff unit="LBS/FT"> 18000 </spring_coeff>
	<damping_coeff unit="LBS/FT/SEC"> 1000 </damping_coeff>
      </contact>

      <contact type="STRUCTURE" name="LEFT-FRONT-HIGH">
	<location unit="M">
	  <x> -6.19 </x>
	  <y> -3.18 </y>
	  <z> 6.07 </z>
	</location>
	<spring_coeff unit="LBS/FT"> 18000 </spring_coeff>
	<damping_coeff unit="LBS/FT/SEC"> 1000 </damping_coeff>
      </contact>
      <contact type="STRUCTURE" name="RIGHT-FRONT-HIGH">
	<location unit="M">
	  <x> -6.19 </x>
	  <y> 3.18 </y>
	  <z> 6.07 </z>
	</location>
	<spring_coeff unit="LBS/FT"> 18000 </spring_coeff>
	<damping_coeff unit="LBS/FT/SEC"> 1000 </damping_coeff>
      </contact>

    </ground_reactions>

    <propulsion>
      <engine file="436TP">
	<location unit="M">
	  <x> 1.0 </x>
	  <y> -0.0 </y>
	  <z> 0.464 </z>
	</location>
	<orient unit="DEG">
	  <pitch> 0.00 </pitch>
	  <roll>  0.00 </roll>
	  <yaw>   0.00 </yaw>
	</orient>
	<feed>0</feed>
	<thruster file="direct">
	  <location unit="M">
	    <x> 1.0 </x>
	    <y> -0.0 </y>
	    <z> 0.464 </z>
	  </location>
	  <orient unit="DEG">
	    <pitch> 0.00 </pitch>
	    <roll>  0.00 </roll>
	    <yaw>   0.00 </yaw>
	  </orient>
	</thruster>
      </engine>
      <!--
      Tank
      -->
      <tank type="FUEL" number="0">
	<location unit="M">
	  <x>  0.0 </x>
	  <y>  0.0 </y>
	  <z>  0.7 </z>
	</location>
	<priority>1</priority>
	<capacity unit="KG"> 4920 </capacity>
	<contents unit="KG"> 400 </contents>
      </tank>

      </propulsion>

    <flight_control name="Truck">

        <channel name="Engine">
          <fcs_function name="fcs/engine-force">
            <function>
              <product>
                <property>/controls/engines/engine/throttle</property>
                <property>/controls/engines/engine/direction</property>
                <value>121000</value>
		<table>
                          <independentVar>/fdm/jsbsim/gear/unit/wheel-speed-fps</independentVar>
                          <tableData>
			    -16         0.1
			    -13.49         1.0
			    -5.06        2.0
                              0.0	3.0
                              5.06	2.0
                              8.43	1.2
                              13.49	1.0
                              25.29	1.0
			      33.72     1.0
			      59.01    1.0
			      67.44    0.1
                          </tableData>
                      </table>
              </product>
            </function>
            <output>external_reactions/engine/magnitude</output>
          </fcs_function>
        </channel>

	<channel name="Enginebrake">
          <fcs_function name="fcs/engine-brake">
            <function>
              <product>
                <property>/fdm/jsbsim/gear/unit/wheel-speed-fps</property>
                <property>/controls/engines/engine/direction</property>
		<property>/fdm/jsbsim/systems/enginebrake</property>
		<property>/fdm/jsbsim/systems/enginebrake-factor</property>
                <value>2400</value>
		<table>
                          <independentVar>/controls/engines/engine/throttle</independentVar>
                          <tableData>
                              0.0	8.5
                              0.05	1.50
                              0.10	0.80
                              0.15	0.28
                              0.25	0.13
			      0.40      0.07
			      0.60      0.05
			      0.80      0.02
			      1.0       0.0
                          </tableData>
                      </table>
              </product>
            </function>
            <output>external_reactions/enginebrake/magnitude</output>
          </fcs_function>
        </channel>

        <channel name="Steer">
            <summer name="Steer Sum">
                <input>fcs/rudder-cmd-norm</input>
                <clipto>
                    <min>-1</min>
                    <max>1</max>
                </clipto>
                <output>fcs/rudder-pos-norm</output>
            </summer>
        </channel>
    </flight_control>

    <aerodynamics>

    </aerodynamics>

    <external_reactions>
      <force name="engine" frame="BODY">
        <location unit="M">
		<x> 1.272</x>
		<y> 0</y>
		<z> 0.642</z>
        </location>
        <direction>
          <x>1</x>
          <y>0</y>
          <z>0</z>
        </direction>
      </force>

      <force name="enginebrake" frame="BODY">
        <location unit="M">
		<x> 1.272</x>
		<y> 0</y>
		<z> 0.642</z>
        </location>
        <direction>
          <x>-1</x>
          <y>0</y>
          <z>0</z>
        </direction>
      </force>
    </external_reactions>
</fdm_config>
